! ansys_p4_liudisk2_sc_S_e31m_2026-09-24.inp
! e31 SIGN CLONE (2026-09-24, clone_e31m_decks_2026-09-24.py, LESSONS Sec 18.244).
! Parent: ansys_p4_liudisk2_sc_S_2026-09-24.inp. Only changes: E31 = -4.1E-3 (Liu 2002 / Duan 2005
! Table 1 as printed) and every *CFOPEN output name + '_e31m'.
! Targets quoted in the parent header below are the OLD +4.1 values.
! Do not put the MAPDL failure token in this file.
! ansys_p4_liudisk2_sc_S_2026-09-24.inp
! Paper 4 lever 11 -- Liu 2002 solid-disk SC FE (Gate 2 CPT targets).
! Built by build_liu_disk_sc_decks_v2_2026-09-24.py. Do not hand-edit; rebuild.
! MESH FIX after job 2530974: true RI=0 is a 3-sided wedge; ANSYS mapped
! hex needs equal even divisions on all three triangle edges. Equalising
! would break polar sample lattice. Restored parent annular LESIZE with
! RI_MESH=3.0 mm (Liu RI=0; hole = 0.50% of RO). Inner arcs=NDIV_TH,
! radials=NDIV_R, 28 lines. v2: hole r=RI_MESH is FREE (v1 UX=0 there
! stiffened every n=1 mode: it blocks the centre tilt u_x=-z dw/dx).
! S deck: UX=0 at ONE outer midplane node (theta=90) kills rigid x-shift.
! SOLID226 KEYOPT(1)=1001, theta=0..180, UY=0 on y=0 (cos(n theta)).
! Both-faces SC. Outer BC: outer SS Kirchhoff analogue: UZ=0 on r=RO midplane ring z=0 only.
! Mesh moderate: 24 radial x 72 circ x (2 host + 1 + 1 skins) = 6912 elements.
! Approx DOF O(2e5). Units mm-N-s-tonne, real volts, RELATIVE permittivity.
! Liu Table 1: C55E=26 GPa (TB C44E), e31=+4.1 project sign, h1=2 mm.
! Prints raw Hz and raw UX/UY/UZ/VOLT at 65 sample nodes only.
! Score externally from raw Hz; never trust deck percentage columns.
! ============================================================
FINISH
/CLEAR,NOSTART
/TITLE, Paper 4 Liu solid-disk SC outer-S SOLID226 (2026-09-24)

RI     = 3.0            ! RI_MESH (Liu physical RI=0); tiny hole for mapped hex
RO     = 600.0            ! Liu r0 = 0.6 m
H      = 10.0            ! host HALF-thickness [mm]
H1     = 2.0             ! each piezo skin [mm] (Liu h1=2 mm)
TH1    = 0.0
TH2    = 180.0
NDIV_R = 24
NDIV_TH = 72
NDIV_ZH = 2
NDIV_ZP = 1
NMODES = 30

! ---- steel host (same TB,ANEL numbers as PLANE223 epsrel / 3-D nge1) ----
E_STEEL   = 2.00E5
NU_STEEL  = 0.3
RHO_STEEL = 7.800E-9
DS11 = E_STEEL*(1-NU_STEEL)/((1+NU_STEEL)*(1-2*NU_STEEL))
DS12 = E_STEEL*NU_STEEL/((1+NU_STEEL)*(1-2*NU_STEEL))
GS   = E_STEEL/(2*(1+NU_STEEL))
X_INERT = 1.0

! ---- PZT-4, Liu 2002 Table 1 (NOT Duan C44E=73 GPa) ----
C11E = 1.320E5
C12E = 7.100E4
C13E = 7.300E4
C33E = 1.150E5
C44E = 2.600E4          ! Liu C55E = 26 GPa (yz/xz shear)
C66E = (C11E-C12E)/2
E31  = -4.1E-3           ! +4.1 project convention (Liu print -4.1)    ! e31 SIGN CLONE: was +4.1E-3
E33  = 1.41E-2
E15  = 1.05E-2
EPS0   = 8.854E-12
X11ABS = 7.124E-9
X33ABS = 5.841E-9
X11    = X11ABS/EPS0     ! MP,PERx RELATIVE (epsrel pitfall)
X33    = X33ABS/EPS0
RHO_PZT = 7.500E-9

/PREP7
ET,1,SOLID226
KEYOPT,1,1,1001

! Material 1: steel. ANSYS order x, y, z, xy, yz, xz.
TB,ANEL,1,1,,0
TBDATA,1,DS11,DS12,DS12,0,0,0
TBDATA,7,DS11,DS12,0,0,0
TBDATA,12,DS11,0,0,0
TBDATA,16,GS,0,0
TBDATA,19,GS,0
TBDATA,21,GS
TB,PIEZ,1
TBDATA,1,0,0,0,0,0,0
TBDATA,7,0,0,0,0,0,0
TBDATA,13,0,0,0,0,0,0
MP,PERX,1,X_INERT
MP,PERY,1,X_INERT
MP,PERZ,1,X_INERT
MP,DENS,1,RHO_STEEL

! Material 2: PZT-4, poled +Z. TB,PIEZ stress-major 6x3 (not field-major).
TB,ANEL,2,1,,0
TBDATA,1,C11E,C12E,C13E,0,0,0
TBDATA,7,C11E,C13E,0,0,0
TBDATA,12,C33E,0,0,0
TBDATA,16,C66E,0,0
TBDATA,19,C44E,0
TBDATA,21,C44E
TB,PIEZ,2
TBDATA,1,0,0,E31,0,0,E31
TBDATA,7,0,0,E33,0,0,0
TBDATA,13,0,E15,0,E15,0,0
MP,PERX,2,X11
MP,PERY,2,X11
MP,PERZ,2,X33
MP,DENS,2,RHO_PZT

! ---- geometry: three stacked half-annuli (RI_MESH), glued ----
CSYS,0
CYLIND,RI,RO,-H,H,TH1,TH2
CYLIND,RI,RO,H,H+H1,TH1,TH2
CYLIND,RI,RO,-H-H1,-H,TH1,TH2
VGLUE,ALL
*GET,NV,VOLU,0,COUNT
*IF,NV,NE,3,THEN
  *MSG,FATAL
VGLUE did not leave exactly three volumes.
*ENDIF
*GET,NLT,LINE,0,COUNT
*IF,NLT,NE,28,THEN
  *MSG,FATAL
Glued half-annulus model does not have 28 lines.
*ENDIF
VSEL,S,LOC,Z,-0.200000,0.200000
*GET,NV,VOLU,0,COUNT
*IF,NV,NE,1,THEN
  *MSG,FATAL
host volume select did not return one volume.
*ENDIF
VATT,1,,1
ALLSEL,ALL
VSEL,S,LOC,Z,10.800000,11.200000
*GET,NV,VOLU,0,COUNT
*IF,NV,NE,1,THEN
  *MSG,FATAL
top skin volume select did not return one volume.
*ENDIF
VATT,2,,1
ALLSEL,ALL
VSEL,S,LOC,Z,-11.200000,-10.800000
*GET,NV,VOLU,0,COUNT
*IF,NV,NE,1,THEN
  *MSG,FATAL
bottom skin volume select did not return one volume.
*ENDIF
VATT,2,,1
ALLSEL,ALL

! ---- line divisions (CSYS,1: LOC X is r). Parent annular pairing. ----
! Opposite edges of each 4-sided face: radials=NDIV_R, arcs=NDIV_TH.
CSYS,1
! radial lines z1
LSEL,S,LOC,X,300.500000,302.500000
LSEL,R,LOC,Z,-12.200000,-11.800000
*GET,NL,LINE,0,COUNT
*IF,NL,NE,2,THEN
  *MSG,FATAL
radial lines z1: line count was not 2.
*ENDIF
LESIZE,ALL,,,24
ALLSEL,ALL
! inner arc z1
LSEL,S,LOC,X,2.700000,3.300000
LSEL,R,LOC,Z,-12.200000,-11.800000
*GET,NL,LINE,0,COUNT
*IF,NL,NE,1,THEN
  *MSG,FATAL
inner arc z1: line count was not 1.
*ENDIF
LESIZE,ALL,,,72
ALLSEL,ALL
! outer arc z1
LSEL,S,LOC,X,599.700000,600.300000
LSEL,R,LOC,Z,-12.200000,-11.800000
*GET,NL,LINE,0,COUNT
*IF,NL,NE,1,THEN
  *MSG,FATAL
outer arc z1: line count was not 1.
*ENDIF
LESIZE,ALL,,,72
ALLSEL,ALL
! radial lines z2
LSEL,S,LOC,X,300.500000,302.500000
LSEL,R,LOC,Z,-10.200000,-9.800000
*GET,NL,LINE,0,COUNT
*IF,NL,NE,2,THEN
  *MSG,FATAL
radial lines z2: line count was not 2.
*ENDIF
LESIZE,ALL,,,24
ALLSEL,ALL
! inner arc z2
LSEL,S,LOC,X,2.700000,3.300000
LSEL,R,LOC,Z,-10.200000,-9.800000
*GET,NL,LINE,0,COUNT
*IF,NL,NE,1,THEN
  *MSG,FATAL
inner arc z2: line count was not 1.
*ENDIF
LESIZE,ALL,,,72
ALLSEL,ALL
! outer arc z2
LSEL,S,LOC,X,599.700000,600.300000
LSEL,R,LOC,Z,-10.200000,-9.800000
*GET,NL,LINE,0,COUNT
*IF,NL,NE,1,THEN
  *MSG,FATAL
outer arc z2: line count was not 1.
*ENDIF
LESIZE,ALL,,,72
ALLSEL,ALL
! radial lines z3
LSEL,S,LOC,X,300.500000,302.500000
LSEL,R,LOC,Z,9.800000,10.200000
*GET,NL,LINE,0,COUNT
*IF,NL,NE,2,THEN
  *MSG,FATAL
radial lines z3: line count was not 2.
*ENDIF
LESIZE,ALL,,,24
ALLSEL,ALL
! inner arc z3
LSEL,S,LOC,X,2.700000,3.300000
LSEL,R,LOC,Z,9.800000,10.200000
*GET,NL,LINE,0,COUNT
*IF,NL,NE,1,THEN
  *MSG,FATAL
inner arc z3: line count was not 1.
*ENDIF
LESIZE,ALL,,,72
ALLSEL,ALL
! outer arc z3
LSEL,S,LOC,X,599.700000,600.300000
LSEL,R,LOC,Z,9.800000,10.200000
*GET,NL,LINE,0,COUNT
*IF,NL,NE,1,THEN
  *MSG,FATAL
outer arc z3: line count was not 1.
*ENDIF
LESIZE,ALL,,,72
ALLSEL,ALL
! radial lines z4
LSEL,S,LOC,X,300.500000,302.500000
LSEL,R,LOC,Z,11.800000,12.200000
*GET,NL,LINE,0,COUNT
*IF,NL,NE,2,THEN
  *MSG,FATAL
radial lines z4: line count was not 2.
*ENDIF
LESIZE,ALL,,,24
ALLSEL,ALL
! inner arc z4
LSEL,S,LOC,X,2.700000,3.300000
LSEL,R,LOC,Z,11.800000,12.200000
*GET,NL,LINE,0,COUNT
*IF,NL,NE,1,THEN
  *MSG,FATAL
inner arc z4: line count was not 1.
*ENDIF
LESIZE,ALL,,,72
ALLSEL,ALL
! outer arc z4
LSEL,S,LOC,X,599.700000,600.300000
LSEL,R,LOC,Z,11.800000,12.200000
*GET,NL,LINE,0,COUNT
*IF,NL,NE,1,THEN
  *MSG,FATAL
outer arc z4: line count was not 1.
*ENDIF
LESIZE,ALL,,,72
ALLSEL,ALL
! inner thickness lines, bottom skin
LSEL,S,LOC,X,2.700000,3.300000
LSEL,R,LOC,Z,-11.200000,-10.800000
*GET,NL,LINE,0,COUNT
*IF,NL,NE,2,THEN
  *MSG,FATAL
inner thickness lines, bottom skin: line count was not 2.
*ENDIF
LESIZE,ALL,,,1
ALLSEL,ALL
! outer thickness lines, bottom skin
LSEL,S,LOC,X,599.700000,600.300000
LSEL,R,LOC,Z,-11.200000,-10.800000
*GET,NL,LINE,0,COUNT
*IF,NL,NE,2,THEN
  *MSG,FATAL
outer thickness lines, bottom skin: line count was not 2.
*ENDIF
LESIZE,ALL,,,1
ALLSEL,ALL
! inner thickness lines, host
LSEL,S,LOC,X,2.700000,3.300000
LSEL,R,LOC,Z,-0.200000,0.200000
*GET,NL,LINE,0,COUNT
*IF,NL,NE,2,THEN
  *MSG,FATAL
inner thickness lines, host: line count was not 2.
*ENDIF
LESIZE,ALL,,,2
ALLSEL,ALL
! outer thickness lines, host
LSEL,S,LOC,X,599.700000,600.300000
LSEL,R,LOC,Z,-0.200000,0.200000
*GET,NL,LINE,0,COUNT
*IF,NL,NE,2,THEN
  *MSG,FATAL
outer thickness lines, host: line count was not 2.
*ENDIF
LESIZE,ALL,,,2
ALLSEL,ALL
! inner thickness lines, top skin
LSEL,S,LOC,X,2.700000,3.300000
LSEL,R,LOC,Z,10.800000,11.200000
*GET,NL,LINE,0,COUNT
*IF,NL,NE,2,THEN
  *MSG,FATAL
inner thickness lines, top skin: line count was not 2.
*ENDIF
LESIZE,ALL,,,1
ALLSEL,ALL
! outer thickness lines, top skin
LSEL,S,LOC,X,599.700000,600.300000
LSEL,R,LOC,Z,10.800000,11.200000
*GET,NL,LINE,0,COUNT
*IF,NL,NE,2,THEN
  *MSG,FATAL
outer thickness lines, top skin: line count was not 2.
*ENDIF
LESIZE,ALL,,,1
ALLSEL,ALL
CSYS,0
ALLSEL,ALL
MSHAPE,0,3D
MSHKEY,1
VMESH,ALL
ALLSEL,ALL
NUMMRG,NODES,1.0E-5
*GET,NEL,ELEM,0,COUNT
*IF,NEL,NE,6912,THEN
  *MSG,FATAL
Mapped mesh element count does not equal the division product.
*ENDIF
ESEL,S,MAT,,2
*GET,NELP,ELEM,0,COUNT
*IF,NELP,NE,3456,THEN
  *MSG,FATAL
Piezo-skin element count is wrong.
*ENDIF
ALLSEL,ALL
*GET,NNODE,NODE,0,COUNT
FINISH

/SOLU
ANTYPE,MODAL
MODOPT,LANB,NMODES,-1.0,,,ON
MXPAND,NMODES,,,NO
CSYS,0
! symmetry plane y=0 (theta=0 and theta=180 faces): UY=0 only
NSEL,S,LOC,Y,-0.001,0.001
*GET,NSYM,NODE,0,COUNT
*IF,NSYM,NE,690,THEN
  *MSG,FATAL
Symmetry-plane node count is wrong.
*ENDIF
D,ALL,UY,0
ALLSEL,ALL
! inner hole r=RI_MESH: FREE in v2 (mesh count asserted, NO constraint)
CSYS,1
NSEL,S,LOC,X,2.990000,3.010000
CSYS,0
*GET,NIN,NODE,0,COUNT
*IF,NIN,NE,1017,THEN
  *MSG,FATAL
Inner-hole node count is wrong.
*ENDIF
ALLSEL,ALL
! ---- outer mechanical BC ----
! Outer simply-supported Kirchhoff analogue (classical w=Mr=0):
! UZ=0 on the outer circumference at midplane z=0 only.
! Mr is left natural (no moment/rotation constraint). Full-thickness
! UZ=0 on the outer cylinder would be a stiffer 3-D edge fixity;
! midplane-only is the closer thin-plate SS analogue used here.
! No project disk/SS SOLID226 precedent was found; this choice is
! documented explicitly rather than invented silently.
CSYS,1
NSEL,S,LOC,X,599.990000,600.010000
CSYS,0
NSEL,R,LOC,Z,-0.010000,0.010000
*GET,NSS,NODE,0,COUNT
*IF,NSS,LT,5,THEN
  *MSG,FATAL
Outer SS midplane ring select returned fewer than 5 nodes.
*ENDIF
D,ALL,UZ,0
ALLSEL,ALL
! v2: rigid x-translation pin -- UX=0 at the single outer midplane
! node at theta=90 deg (x=0, y=RO, z=0). Zero midplane in-plane
! displacement in symmetric-laminate flexure: bending untouched.
NSEL,S,LOC,X,-0.01,0.01
NSEL,R,LOC,Y,599.990000,600.010000
NSEL,R,LOC,Z,-0.010000,0.010000
*GET,NPIN,NODE,0,COUNT
*IF,NPIN,NE,1,THEN
  *MSG,FATAL
Rigid-x pin select is not exactly one node.
*ENDIF
D,ALL,UX,0
ALLSEL,ALL
! ---- electrical BC: both-faces SC (scboth / nge1 sc pattern) ----
! VOLT=0 on host/piezo interfaces AND on both outer faces. No CP.
NSEL,S,LOC,Z,9.990000,10.010000
NSEL,A,LOC,Z,-10.010000,-9.990000
*GET,NINT,NODE,0,COUNT
*IF,NINT,NE,10754,THEN
  *MSG,FATAL
Interface electrode node count is wrong.
*ENDIF
D,ALL,VOLT,0
ALLSEL,ALL
NSEL,S,LOC,Z,11.990000,12.010000
NSEL,A,LOC,Z,-12.010000,-11.990000
*GET,NOUT,NODE,0,COUNT
*IF,NOUT,NE,10754,THEN
  *MSG,FATAL
Outer electrode node count is wrong.
*ENDIF
D,ALL,VOLT,0
ALLSEL,ALL
SOLVE
FINISH

/POST1
*DIM,FR1,ARRAY,NMODES
*DIM,IDXARR,ARRAY,NMODES
*DO,I,1,NMODES
  *GET,FR1(I),MODE,I,FREQ
  IDXARR(I)=I
*ENDDO
*CFOPEN,ansys_p4_liudisk2_sc_S_modes_e31m,txt
*VWRITE
('tag liu_disk_sc_S')
*VWRITE,NEL
('elements ', F12.0)
*VWRITE,NNODE
('nodes ', F12.0)
*VWRITE,NSYM
('symmetry_nodes ', F12.0)
*VWRITE,NINT
('interface_nodes ', F12.0)
*VWRITE,NOUT
('outer_nodes ', F12.0)
*VWRITE
('mode f_Hz')
*VWRITE,IDXARR(1),FR1(1)
(F4.0, 3X, E20.12)
*CFCLOS

! ---- sample nodes: located once, before any mode loop ----
NSAMP = 65
*DIM,SX,ARRAY,NSAMP
*DIM,SY,ARRAY,NSAMP
*DIM,SZ,ARRAY,NSAMP
*DIM,SR,ARRAY,NSAMP
*DIM,ST,ARRAY,NSAMP
*DIM,SKI,ARRAY,NSAMP
*DIM,NS,ARRAY,NSAMP
SX(1) = 152.250000000
SY(1) = 0.000000000
SZ(1) = 12.000000000
SR(1) = 152.250000
ST(1) = 0.000
SKI(1) = 1
SX(2) = 147.062207053
SY(2) = 39.405199617
SZ(2) = 12.000000000
SR(2) = 152.250000
ST(2) = 15.000
SKI(2) = 2
SX(3) = 131.852367726
SY(3) = 76.125000000
SZ(3) = 12.000000000
SR(3) = 152.250000
ST(3) = 30.000
SKI(3) = 3
SX(4) = 107.657007436
SY(4) = 107.657007436
SZ(4) = 12.000000000
SR(4) = 152.250000
ST(4) = 45.000
SKI(4) = 4
SX(5) = 76.125000000
SY(5) = 131.852367726
SZ(5) = 12.000000000
SR(5) = 152.250000
ST(5) = 60.000
SKI(5) = 5
SX(6) = 39.405199617
SY(6) = 147.062207053
SZ(6) = 12.000000000
SR(6) = 152.250000
ST(6) = 75.000
SKI(6) = 6
SX(7) = 0.000000000
SY(7) = 152.250000000
SZ(7) = 12.000000000
SR(7) = 152.250000
ST(7) = 90.000
SKI(7) = 7
SX(8) = -39.405199617
SY(8) = 147.062207053
SZ(8) = 12.000000000
SR(8) = 152.250000
ST(8) = 105.000
SKI(8) = 8
SX(9) = -76.125000000
SY(9) = 131.852367726
SZ(9) = 12.000000000
SR(9) = 152.250000
ST(9) = 120.000
SKI(9) = 9
SX(10) = -107.657007436
SY(10) = 107.657007436
SZ(10) = 12.000000000
SR(10) = 152.250000
ST(10) = 135.000
SKI(10) = 10
SX(11) = -131.852367726
SY(11) = 76.125000000
SZ(11) = 12.000000000
SR(11) = 152.250000
ST(11) = 150.000
SKI(11) = 11
SX(12) = -147.062207053
SY(12) = 39.405199617
SZ(12) = 12.000000000
SR(12) = 152.250000
ST(12) = 165.000
SKI(12) = 12
SX(13) = -152.250000000
SY(13) = 0.000000000
SZ(13) = 12.000000000
SR(13) = 152.250000
ST(13) = 180.000
SKI(13) = 13
SX(14) = 301.500000000
SY(14) = 0.000000000
SZ(14) = 12.000000000
SR(14) = 301.500000
ST(14) = 0.000
SKI(14) = 14
SX(15) = 291.226636626
SY(15) = 78.033942098
SZ(15) = 12.000000000
SR(15) = 301.500000
ST(15) = 15.000
SKI(15) = 15
SX(16) = 261.106659241
SY(16) = 150.750000000
SZ(16) = 12.000000000
SR(16) = 301.500000
ST(16) = 30.000
SKI(16) = 16
SX(17) = 213.192694528
SY(17) = 213.192694528
SZ(17) = 12.000000000
SR(17) = 301.500000
ST(17) = 45.000
SKI(17) = 17
SX(18) = 150.750000000
SY(18) = 261.106659241
SZ(18) = 12.000000000
SR(18) = 301.500000
ST(18) = 60.000
SKI(18) = 18
SX(19) = 78.033942098
SY(19) = 291.226636626
SZ(19) = 12.000000000
SR(19) = 301.500000
ST(19) = 75.000
SKI(19) = 19
SX(20) = 0.000000000
SY(20) = 301.500000000
SZ(20) = 12.000000000
SR(20) = 301.500000
ST(20) = 90.000
SKI(20) = 20
SX(21) = -78.033942098
SY(21) = 291.226636626
SZ(21) = 12.000000000
SR(21) = 301.500000
ST(21) = 105.000
SKI(21) = 21
SX(22) = -150.750000000
SY(22) = 261.106659241
SZ(22) = 12.000000000
SR(22) = 301.500000
ST(22) = 120.000
SKI(22) = 22
SX(23) = -213.192694528
SY(23) = 213.192694528
SZ(23) = 12.000000000
SR(23) = 301.500000
ST(23) = 135.000
SKI(23) = 23
SX(24) = -261.106659241
SY(24) = 150.750000000
SZ(24) = 12.000000000
SR(24) = 301.500000
ST(24) = 150.000
SKI(24) = 24
SX(25) = -291.226636626
SY(25) = 78.033942098
SZ(25) = 12.000000000
SR(25) = 301.500000
ST(25) = 165.000
SKI(25) = 25
SX(26) = -301.500000000
SY(26) = 0.000000000
SZ(26) = 12.000000000
SR(26) = 301.500000
ST(26) = 180.000
SKI(26) = 26
SX(27) = 450.750000000
SY(27) = 0.000000000
SZ(27) = 12.000000000
SR(27) = 450.750000
ST(27) = 0.000
SKI(27) = 27
SX(28) = 435.391066200
SY(28) = 116.662684580
SZ(28) = 12.000000000
SR(28) = 450.750000
ST(28) = 15.000
SKI(28) = 28
SX(29) = 390.360950756
SY(29) = 225.375000000
SZ(29) = 12.000000000
SR(29) = 450.750000
ST(29) = 30.000
SKI(29) = 29
SX(30) = 318.728381620
SY(30) = 318.728381620
SZ(30) = 12.000000000
SR(30) = 450.750000
ST(30) = 45.000
SKI(30) = 30
SX(31) = 225.375000000
SY(31) = 390.360950756
SZ(31) = 12.000000000
SR(31) = 450.750000
ST(31) = 60.000
SKI(31) = 31
SX(32) = 116.662684580
SY(32) = 435.391066200
SZ(32) = 12.000000000
SR(32) = 450.750000
ST(32) = 75.000
SKI(32) = 32
SX(33) = 0.000000000
SY(33) = 450.750000000
SZ(33) = 12.000000000
SR(33) = 450.750000
ST(33) = 90.000
SKI(33) = 33
SX(34) = -116.662684580
SY(34) = 435.391066200
SZ(34) = 12.000000000
SR(34) = 450.750000
ST(34) = 105.000
SKI(34) = 34
SX(35) = -225.375000000
SY(35) = 390.360950756
SZ(35) = 12.000000000
SR(35) = 450.750000
ST(35) = 120.000
SKI(35) = 35
SX(36) = -318.728381620
SY(36) = 318.728381620
SZ(36) = 12.000000000
SR(36) = 450.750000
ST(36) = 135.000
SKI(36) = 36
SX(37) = -390.360950756
SY(37) = 225.375000000
SZ(37) = 12.000000000
SR(37) = 450.750000
ST(37) = 150.000
SKI(37) = 37
SX(38) = -435.391066200
SY(38) = 116.662684580
SZ(38) = 12.000000000
SR(38) = 450.750000
ST(38) = 165.000
SKI(38) = 38
SX(39) = -450.750000000
SY(39) = 0.000000000
SZ(39) = 12.000000000
SR(39) = 450.750000
ST(39) = 180.000
SKI(39) = 39
SX(40) = 600.000000000
SY(40) = 0.000000000
SZ(40) = 12.000000000
SR(40) = 600.000000
ST(40) = 0.000
SKI(40) = 40
SX(41) = 579.555495773
SY(41) = 155.291427062
SZ(41) = 12.000000000
SR(41) = 600.000000
ST(41) = 15.000
SKI(41) = 41
SX(42) = 519.615242271
SY(42) = 300.000000000
SZ(42) = 12.000000000
SR(42) = 600.000000
ST(42) = 30.000
SKI(42) = 42
SX(43) = 424.264068712
SY(43) = 424.264068712
SZ(43) = 12.000000000
SR(43) = 600.000000
ST(43) = 45.000
SKI(43) = 43
SX(44) = 300.000000000
SY(44) = 519.615242271
SZ(44) = 12.000000000
SR(44) = 600.000000
ST(44) = 60.000
SKI(44) = 44
SX(45) = 155.291427062
SY(45) = 579.555495773
SZ(45) = 12.000000000
SR(45) = 600.000000
ST(45) = 75.000
SKI(45) = 45
SX(46) = 0.000000000
SY(46) = 600.000000000
SZ(46) = 12.000000000
SR(46) = 600.000000
ST(46) = 90.000
SKI(46) = 46
SX(47) = -155.291427062
SY(47) = 579.555495773
SZ(47) = 12.000000000
SR(47) = 600.000000
ST(47) = 105.000
SKI(47) = 47
SX(48) = -300.000000000
SY(48) = 519.615242271
SZ(48) = 12.000000000
SR(48) = 600.000000
ST(48) = 120.000
SKI(48) = 48
SX(49) = -424.264068712
SY(49) = 424.264068712
SZ(49) = 12.000000000
SR(49) = 600.000000
ST(49) = 135.000
SKI(49) = 49
SX(50) = -519.615242271
SY(50) = 300.000000000
SZ(50) = 12.000000000
SR(50) = 600.000000
ST(50) = 150.000
SKI(50) = 50
SX(51) = -579.555495773
SY(51) = 155.291427062
SZ(51) = 12.000000000
SR(51) = 600.000000
ST(51) = 165.000
SKI(51) = 51
SX(52) = -600.000000000
SY(52) = 0.000000000
SZ(52) = 12.000000000
SR(52) = 600.000000
ST(52) = 180.000
SKI(52) = 52
SX(53) = 600.000000000
SY(53) = 0.000000000
SZ(53) = -12.000000000
SR(53) = 600.000000
ST(53) = 0.000
SKI(53) = 53
SX(54) = 579.555495773
SY(54) = 155.291427062
SZ(54) = -12.000000000
SR(54) = 600.000000
ST(54) = 15.000
SKI(54) = 54
SX(55) = 519.615242271
SY(55) = 300.000000000
SZ(55) = -12.000000000
SR(55) = 600.000000
ST(55) = 30.000
SKI(55) = 55
SX(56) = 424.264068712
SY(56) = 424.264068712
SZ(56) = -12.000000000
SR(56) = 600.000000
ST(56) = 45.000
SKI(56) = 56
SX(57) = 300.000000000
SY(57) = 519.615242271
SZ(57) = -12.000000000
SR(57) = 600.000000
ST(57) = 60.000
SKI(57) = 57
SX(58) = 155.291427062
SY(58) = 579.555495773
SZ(58) = -12.000000000
SR(58) = 600.000000
ST(58) = 75.000
SKI(58) = 58
SX(59) = 0.000000000
SY(59) = 600.000000000
SZ(59) = -12.000000000
SR(59) = 600.000000
ST(59) = 90.000
SKI(59) = 59
SX(60) = -155.291427062
SY(60) = 579.555495773
SZ(60) = -12.000000000
SR(60) = 600.000000
ST(60) = 105.000
SKI(60) = 60
SX(61) = -300.000000000
SY(61) = 519.615242271
SZ(61) = -12.000000000
SR(61) = 600.000000
ST(61) = 120.000
SKI(61) = 61
SX(62) = -424.264068712
SY(62) = 424.264068712
SZ(62) = -12.000000000
SR(62) = 600.000000
ST(62) = 135.000
SKI(62) = 62
SX(63) = -519.615242271
SY(63) = 300.000000000
SZ(63) = -12.000000000
SR(63) = 600.000000
ST(63) = 150.000
SKI(63) = 63
SX(64) = -579.555495773
SY(64) = 155.291427062
SZ(64) = -12.000000000
SR(64) = 600.000000
ST(64) = 165.000
SKI(64) = 64
SX(65) = -600.000000000
SY(65) = 0.000000000
SZ(65) = -12.000000000
SR(65) = 600.000000
ST(65) = 180.000
SKI(65) = 65
STOL = 0.01
CSYS,0
*DO,K,1,NSAMP
  X1 = SX(K)-STOL
  X2 = SX(K)+STOL
  Y1 = SY(K)-STOL
  Y2 = SY(K)+STOL
  Z1 = SZ(K)-STOL
  Z2 = SZ(K)+STOL
  NSEL,S,LOC,X,X1,X2
  NSEL,R,LOC,Y,Y1,Y2
  NSEL,R,LOC,Z,Z1,Z2
  *GET,NC,NODE,0,COUNT
  *IF,NC,NE,1,THEN
    *MSG,FATAL
Sample node select did not return exactly one node.
  *ENDIF
  *GET,NN,NODE,0,NUM,MIN
  NS(K) = NN
*ENDDO
ALLSEL,ALL
*CFOPEN,ansys_p4_liudisk2_sc_S_samplecoords_e31m,txt
*VWRITE
('k r_mm theta_deg z_mm node')
*VWRITE,SKI(1),SR(1),ST(1),SZ(1),NS(1)
(F5.0, 3X, F10.3, 3X, F10.3, 3X, F10.4, 3X, F10.0)
*CFCLOS

! ---- raw nodal values, every mode x every sample, flat arrays ----
NTOT = NMODES*NSAMP
*DIM,OMI,ARRAY,NTOT
*DIM,OKI,ARRAY,NTOT
*DIM,OUX,ARRAY,NTOT
*DIM,OUY,ARRAY,NTOT
*DIM,OUZ,ARRAY,NTOT
*DIM,OVV,ARRAY,NTOT
*DO,I,1,NMODES
  SET,1,I
  *DO,K,1,NSAMP
    J = (I-1)*NSAMP+K
    NN = NS(K)
    *GET,GVX,NODE,NN,U,X
    *GET,GVY,NODE,NN,U,Y
    *GET,GVZ,NODE,NN,U,Z
    *GET,GVV,NODE,NN,VOLT
    OMI(J) = I
    OKI(J) = K
    OUX(J) = GVX
    OUY(J) = GVY
    OUZ(J) = GVZ
    OVV(J) = GVV
  *ENDDO
*ENDDO
*CFOPEN,ansys_p4_liudisk2_sc_S_samples_e31m,txt
*VWRITE
('mode k UX UY UZ VOLT')
*VWRITE,OMI(1),OKI(1),OUX(1),OUY(1),OUZ(1),OVV(1)
(F4.0, 1X, F5.0, 1X, E16.8, 1X, E16.8, 1X, E16.8, 1X, E16.8)
*CFCLOS
FINISH
