! ansys_p5mix_e31m_cc_c73_m320_2026-09-24.inp
! Paper 5 segmented-electrode sensing charge, mixed edges, harmonic FE (2026-09-24).
! Built by build_p5mix_decks_2026-09-24.py. Do not hand-edit; rebuild.
! Pre-registration: PAPER5_MIXED_EDGE_SENSING_2026-09-24.md.
! Mechanical BC: CC (clamped inner, clamped outer). Rims electrically insulated.
! Question 1 (interior cuts r* = 300, 450 mm): does the e15-consistent
!   factor kappa = -0.0547 (C44E = 73 GPa) carry over from F-F
!   (job 2531984) to this edge pairing?
! Question 2 (cuts within 2.5H of a clamped rim): which rim model, if any,
!   matches -- M1 phibar'=0 or M2 insulated rim with the e15 shear term?
! Geometry/material/element identical to ansys_p5seg_* (C44E parameterised).
! UNITS: mm-N-s-tonne, real volts. CHRG comes out in mC (1e-3 C).
!   ANSYS 2025R1 reports CHRG reaction = -(electrode charge) (job 2531984);
!   LS1 re-measures that sign in every deck.
! LS1: sign calibration. Top inner segment (r <= RSTAR) at 1 V, others 0 V,
!      no force.
! LS2..LS6: all face nodes 0 V (SC), FY = 1 N total ring load at r = RLOAD
!      spread over the through-thickness node line (flexure only).
! Output: one file per load step, raw per-node r and CHRG (Re, Im) on the
! top and bottom faces. The scorer does every sum and ratio.
! Do not put the MAPDL failure token in this file (queue grep false-fail).
! ============================================================
FINISH
/CLEAR,NOSTART
/TITLE, Paper 5 mixed-edge segment charge CC, C44E=73 GPa, mesh 320x24 (2026-09-24)

RI     = 100.0
RO     = 600.0
H      = 10.0
RLOAD  = 350.0
RSTAR  = 300.0
TOL    = 1.0E-3
NDIV_R = 320
NDIV_Z = 24
FTOT   = 1.0
CLAMPI = 1
CLAMPO = 1

C11E = 1.320E5
C12E = 7.100E4
C13E = 7.300E4
C33E = 1.150E5
C44E = 7.3000E+04
C66E = (C11E-C12E)/2
E31  = -4.1E-3
E33  = 1.41E-2
E15  = 1.05E-2
EPS0   = 8.854E-12
X11ABS = 7.124E-9
X33ABS = 5.841E-9
X11    = X11ABS/EPS0
X33    = X33ABS/EPS0
RHO_PZT = 7.500E-9

/PREP7
ET,1,PLANE223
KEYOPT,1,1,1001
KEYOPT,1,3,1

TB,ANEL,1,1,,0
TBDATA,1,C11E,C13E,C12E,0,0,0
TBDATA,7,C33E,C13E,0,0,0
TBDATA,12,C11E,0,0,0
TBDATA,16,C44E,0,0
TBDATA,19,C66E,0
TBDATA,21,C44E
TB,PIEZ,1
TBDATA,1,0,E31,0,0,E33,0
TBDATA,7,0,E31,0,E15,0,0
TBDATA,13,0,0,E15,0,0,0
MP,PERX,1,X11
MP,PERY,1,X33
MP,PERZ,1,X11
MP,DENS,1,RHO_PZT

RECTNG,RI,RO,-H,H
ASEL,S,AREA,,1
AATT,1,,1
LSLA,S
LSEL,R,LOC,X,RI
LESIZE,ALL,,,NDIV_Z,,,,,1
LSLA,S
LSEL,R,LOC,X,RO
LESIZE,ALL,,,NDIV_Z,,,,,1
LSLA,S
LSEL,R,LOC,Y,-H
LESIZE,ALL,,,NDIV_R,,,,,1
LSLA,S
LSEL,R,LOC,Y,H
LESIZE,ALL,,,NDIV_R,,,,,1
ALLSEL,ALL
ASEL,S,AREA,,1
MSHAPE,0,2D
MSHKEY,1
AMESH,ALL
ALLSEL,ALL
! Mesh guards: every scored cut radius and RLOAD must be a corner-node
! radius, and the element count must be NDIV_R*NDIV_Z. *MSG,FATAL stops
! the deck before any solve.
*GET,NELEM,ELEM,0,COUNT
*IF,NELEM,NE,NDIV_R*NDIV_Z,THEN
  *MSG,FATAL
Mapped mesh element count does not equal NDIV_R*NDIV_Z.
*ENDIF
NSEL,S,LOC,Y,H-TOL,H+TOL
NSEL,R,LOC,X,112.5000-TOL,112.5000+TOL
*GET,NCK1,NODE,0,COUNT
ALLSEL,ALL
*IF,NCK1,NE,1,THEN
  *MSG,FATAL
No single top-face node at a scored cut radius (guard 1).
*ENDIF
NSEL,S,LOC,Y,H-TOL,H+TOL
NSEL,R,LOC,X,125.0000-TOL,125.0000+TOL
*GET,NCK2,NODE,0,COUNT
ALLSEL,ALL
*IF,NCK2,NE,1,THEN
  *MSG,FATAL
No single top-face node at a scored cut radius (guard 2).
*ENDIF
NSEL,S,LOC,Y,H-TOL,H+TOL
NSEL,R,LOC,X,300.0000-TOL,300.0000+TOL
*GET,NCK3,NODE,0,COUNT
ALLSEL,ALL
*IF,NCK3,NE,1,THEN
  *MSG,FATAL
No single top-face node at a scored cut radius (guard 3).
*ENDIF
NSEL,S,LOC,Y,H-TOL,H+TOL
NSEL,R,LOC,X,450.0000-TOL,450.0000+TOL
*GET,NCK4,NODE,0,COUNT
ALLSEL,ALL
*IF,NCK4,NE,1,THEN
  *MSG,FATAL
No single top-face node at a scored cut radius (guard 4).
*ENDIF
NSEL,S,LOC,Y,H-TOL,H+TOL
NSEL,R,LOC,X,575.0000-TOL,575.0000+TOL
*GET,NCK5,NODE,0,COUNT
ALLSEL,ALL
*IF,NCK5,NE,1,THEN
  *MSG,FATAL
No single top-face node at a scored cut radius (guard 5).
*ENDIF
NSEL,S,LOC,X,RLOAD-TOL,RLOAD+TOL
*GET,NFN,NODE,0,COUNT
ALLSEL,ALL
*IF,NFN,NE,2*NDIV_Z+1,THEN
  *MSG,FATAL
Force node line at r = RLOAD is not 2*NDIV_Z+1 nodes.
*ENDIF
FINISH

/SOLU
ANTYPE,HARMIC
HROPT,FULL
HROUT,OFF
OUTRES,NSOL,ALL
OUTRES,RSOL,ALL
KBC,1
EQSLV,SPARSE

! Both faces grounded everywhere.
NSEL,S,LOC,Y,H-TOL,H+TOL
NSEL,A,LOC,Y,-H-TOL,-H+TOL
D,ALL,VOLT,0
ALLSEL,ALL

! Mechanical clamps (all nodes of the rim line, UX = UY = 0).
*IF,CLAMPI,EQ,1,THEN
  NSEL,S,LOC,X,RI-TOL,RI+TOL
  D,ALL,UX,0
  D,ALL,UY,0
  ALLSEL,ALL
*ENDIF
*IF,CLAMPO,EQ,1,THEN
  NSEL,S,LOC,X,RO-TOL,RO+TOL
  D,ALL,UX,0
  D,ALL,UY,0
  ALLSEL,ALL
*ENDIF

! LS1 -- sign calibration: top inner segment at 1 V, no force.
NSEL,S,LOC,Y,H-TOL,H+TOL
NSEL,R,LOC,X,RI-TOL,RSTAR+TOL
D,ALL,VOLT,1.0
ALLSEL,ALL
HARFRQ,15.915494309,15.915494309
NSUBST,1
LSWRITE,1

! LS2.. -- SC, ring load at RLOAD.
NSEL,S,LOC,Y,H-TOL,H+TOL
NSEL,R,LOC,X,RI-TOL,RSTAR+TOL
D,ALL,VOLT,0
NSEL,S,LOC,X,RLOAD-TOL,RLOAD+TOL
F,ALL,FY,FTOT/NFN
ALLSEL,ALL
HARFRQ,61.715830593,61.715830593
NSUBST,1
LSWRITE,2
HARFRQ,108.002703537,108.002703537
NSUBST,1
LSWRITE,3
HARFRQ,154.289576482,154.289576482
NSUBST,1
LSWRITE,4
HARFRQ,200.576608581,200.576608581
NSUBST,1
LSWRITE,5
HARFRQ,246.863481525,246.863481525
NSUBST,1
LSWRITE,6

LSSOLVE,1,6
FINISH

/POST1
SET,2,1,,0
NSEL,S,LOC,Y,H-TOL,H+TOL
NSEL,R,LOC,X,RSTAR-TOL,RSTAR+TOL
PRRSOL,CHRG
ALLSEL,ALL

NSEL,S,LOC,Y,H-TOL,H+TOL
*GET,NTOP,NODE,0,COUNT
ALLSEL,ALL
*DIM,IDX,ARRAY,NTOP
*DIM,RT,ARRAY,NTOP
*DIM,RB,ARRAY,NTOP
*DIM,FRQ,ARRAY,6
*DIM,LSN,ARRAY,6
! ---- load step 1 ----
*DIM,QTR1,ARRAY,NTOP
*DIM,QTI1,ARRAY,NTOP
*DIM,QBR1,ARRAY,NTOP
*DIM,QBI1,ARRAY,NTOP
SET,1,1,,0
*GET,FRQ(1),ACTIVE,0,SET,FREQ
LSN(1)=1
NSEL,S,LOC,Y,H-TOL,H+TOL
ND=0
*DO,I,1,NTOP
  ND=NDNEXT(ND)
  IDX(I)=I
  RT(I)=NX(ND)
  *GET,QTR1(I),NODE,ND,RF,CHRG
*ENDDO
NSEL,S,LOC,Y,-H-TOL,-H+TOL
ND=0
*DO,I,1,NTOP
  ND=NDNEXT(ND)
  RB(I)=NX(ND)
  *GET,QBR1(I),NODE,ND,RF,CHRG
*ENDDO
SET,1,1,,1
NSEL,S,LOC,Y,H-TOL,H+TOL
ND=0
*DO,I,1,NTOP
  ND=NDNEXT(ND)
  *GET,QTI1(I),NODE,ND,RF,CHRG
*ENDDO
NSEL,S,LOC,Y,-H-TOL,-H+TOL
ND=0
*DO,I,1,NTOP
  ND=NDNEXT(ND)
  *GET,QBI1(I),NODE,ND,RF,CHRG
*ENDDO
ALLSEL,ALL
*CFOPEN,ansys_p5mix_e31m_cc_c73_m320_ls1,txt
*VWRITE
('i  r_top  QtopRe  QtopIm  r_bot  QbotRe  QbotIm   [mm, mC]')
*VWRITE,IDX(1),RT(1),QTR1(1),QTI1(1),RB(1),QBR1(1),QBI1(1)
(F6.0,1X,E20.12,1X,E20.12,1X,E20.12,1X,E20.12,1X,E20.12,1X,E20.12)
*CFCLOS
! ---- load step 2 ----
*DIM,QTR2,ARRAY,NTOP
*DIM,QTI2,ARRAY,NTOP
*DIM,QBR2,ARRAY,NTOP
*DIM,QBI2,ARRAY,NTOP
SET,2,1,,0
*GET,FRQ(2),ACTIVE,0,SET,FREQ
LSN(2)=2
NSEL,S,LOC,Y,H-TOL,H+TOL
ND=0
*DO,I,1,NTOP
  ND=NDNEXT(ND)
  IDX(I)=I
  RT(I)=NX(ND)
  *GET,QTR2(I),NODE,ND,RF,CHRG
*ENDDO
NSEL,S,LOC,Y,-H-TOL,-H+TOL
ND=0
*DO,I,1,NTOP
  ND=NDNEXT(ND)
  RB(I)=NX(ND)
  *GET,QBR2(I),NODE,ND,RF,CHRG
*ENDDO
SET,2,1,,1
NSEL,S,LOC,Y,H-TOL,H+TOL
ND=0
*DO,I,1,NTOP
  ND=NDNEXT(ND)
  *GET,QTI2(I),NODE,ND,RF,CHRG
*ENDDO
NSEL,S,LOC,Y,-H-TOL,-H+TOL
ND=0
*DO,I,1,NTOP
  ND=NDNEXT(ND)
  *GET,QBI2(I),NODE,ND,RF,CHRG
*ENDDO
ALLSEL,ALL
*CFOPEN,ansys_p5mix_e31m_cc_c73_m320_ls2,txt
*VWRITE
('i  r_top  QtopRe  QtopIm  r_bot  QbotRe  QbotIm   [mm, mC]')
*VWRITE,IDX(1),RT(1),QTR2(1),QTI2(1),RB(1),QBR2(1),QBI2(1)
(F6.0,1X,E20.12,1X,E20.12,1X,E20.12,1X,E20.12,1X,E20.12,1X,E20.12)
*CFCLOS
! ---- load step 3 ----
*DIM,QTR3,ARRAY,NTOP
*DIM,QTI3,ARRAY,NTOP
*DIM,QBR3,ARRAY,NTOP
*DIM,QBI3,ARRAY,NTOP
SET,3,1,,0
*GET,FRQ(3),ACTIVE,0,SET,FREQ
LSN(3)=3
NSEL,S,LOC,Y,H-TOL,H+TOL
ND=0
*DO,I,1,NTOP
  ND=NDNEXT(ND)
  IDX(I)=I
  RT(I)=NX(ND)
  *GET,QTR3(I),NODE,ND,RF,CHRG
*ENDDO
NSEL,S,LOC,Y,-H-TOL,-H+TOL
ND=0
*DO,I,1,NTOP
  ND=NDNEXT(ND)
  RB(I)=NX(ND)
  *GET,QBR3(I),NODE,ND,RF,CHRG
*ENDDO
SET,3,1,,1
NSEL,S,LOC,Y,H-TOL,H+TOL
ND=0
*DO,I,1,NTOP
  ND=NDNEXT(ND)
  *GET,QTI3(I),NODE,ND,RF,CHRG
*ENDDO
NSEL,S,LOC,Y,-H-TOL,-H+TOL
ND=0
*DO,I,1,NTOP
  ND=NDNEXT(ND)
  *GET,QBI3(I),NODE,ND,RF,CHRG
*ENDDO
ALLSEL,ALL
*CFOPEN,ansys_p5mix_e31m_cc_c73_m320_ls3,txt
*VWRITE
('i  r_top  QtopRe  QtopIm  r_bot  QbotRe  QbotIm   [mm, mC]')
*VWRITE,IDX(1),RT(1),QTR3(1),QTI3(1),RB(1),QBR3(1),QBI3(1)
(F6.0,1X,E20.12,1X,E20.12,1X,E20.12,1X,E20.12,1X,E20.12,1X,E20.12)
*CFCLOS
! ---- load step 4 ----
*DIM,QTR4,ARRAY,NTOP
*DIM,QTI4,ARRAY,NTOP
*DIM,QBR4,ARRAY,NTOP
*DIM,QBI4,ARRAY,NTOP
SET,4,1,,0
*GET,FRQ(4),ACTIVE,0,SET,FREQ
LSN(4)=4
NSEL,S,LOC,Y,H-TOL,H+TOL
ND=0
*DO,I,1,NTOP
  ND=NDNEXT(ND)
  IDX(I)=I
  RT(I)=NX(ND)
  *GET,QTR4(I),NODE,ND,RF,CHRG
*ENDDO
NSEL,S,LOC,Y,-H-TOL,-H+TOL
ND=0
*DO,I,1,NTOP
  ND=NDNEXT(ND)
  RB(I)=NX(ND)
  *GET,QBR4(I),NODE,ND,RF,CHRG
*ENDDO
SET,4,1,,1
NSEL,S,LOC,Y,H-TOL,H+TOL
ND=0
*DO,I,1,NTOP
  ND=NDNEXT(ND)
  *GET,QTI4(I),NODE,ND,RF,CHRG
*ENDDO
NSEL,S,LOC,Y,-H-TOL,-H+TOL
ND=0
*DO,I,1,NTOP
  ND=NDNEXT(ND)
  *GET,QBI4(I),NODE,ND,RF,CHRG
*ENDDO
ALLSEL,ALL
*CFOPEN,ansys_p5mix_e31m_cc_c73_m320_ls4,txt
*VWRITE
('i  r_top  QtopRe  QtopIm  r_bot  QbotRe  QbotIm   [mm, mC]')
*VWRITE,IDX(1),RT(1),QTR4(1),QTI4(1),RB(1),QBR4(1),QBI4(1)
(F6.0,1X,E20.12,1X,E20.12,1X,E20.12,1X,E20.12,1X,E20.12,1X,E20.12)
*CFCLOS
! ---- load step 5 ----
*DIM,QTR5,ARRAY,NTOP
*DIM,QTI5,ARRAY,NTOP
*DIM,QBR5,ARRAY,NTOP
*DIM,QBI5,ARRAY,NTOP
SET,5,1,,0
*GET,FRQ(5),ACTIVE,0,SET,FREQ
LSN(5)=5
NSEL,S,LOC,Y,H-TOL,H+TOL
ND=0
*DO,I,1,NTOP
  ND=NDNEXT(ND)
  IDX(I)=I
  RT(I)=NX(ND)
  *GET,QTR5(I),NODE,ND,RF,CHRG
*ENDDO
NSEL,S,LOC,Y,-H-TOL,-H+TOL
ND=0
*DO,I,1,NTOP
  ND=NDNEXT(ND)
  RB(I)=NX(ND)
  *GET,QBR5(I),NODE,ND,RF,CHRG
*ENDDO
SET,5,1,,1
NSEL,S,LOC,Y,H-TOL,H+TOL
ND=0
*DO,I,1,NTOP
  ND=NDNEXT(ND)
  *GET,QTI5(I),NODE,ND,RF,CHRG
*ENDDO
NSEL,S,LOC,Y,-H-TOL,-H+TOL
ND=0
*DO,I,1,NTOP
  ND=NDNEXT(ND)
  *GET,QBI5(I),NODE,ND,RF,CHRG
*ENDDO
ALLSEL,ALL
*CFOPEN,ansys_p5mix_e31m_cc_c73_m320_ls5,txt
*VWRITE
('i  r_top  QtopRe  QtopIm  r_bot  QbotRe  QbotIm   [mm, mC]')
*VWRITE,IDX(1),RT(1),QTR5(1),QTI5(1),RB(1),QBR5(1),QBI5(1)
(F6.0,1X,E20.12,1X,E20.12,1X,E20.12,1X,E20.12,1X,E20.12,1X,E20.12)
*CFCLOS
! ---- load step 6 ----
*DIM,QTR6,ARRAY,NTOP
*DIM,QTI6,ARRAY,NTOP
*DIM,QBR6,ARRAY,NTOP
*DIM,QBI6,ARRAY,NTOP
SET,6,1,,0
*GET,FRQ(6),ACTIVE,0,SET,FREQ
LSN(6)=6
NSEL,S,LOC,Y,H-TOL,H+TOL
ND=0
*DO,I,1,NTOP
  ND=NDNEXT(ND)
  IDX(I)=I
  RT(I)=NX(ND)
  *GET,QTR6(I),NODE,ND,RF,CHRG
*ENDDO
NSEL,S,LOC,Y,-H-TOL,-H+TOL
ND=0
*DO,I,1,NTOP
  ND=NDNEXT(ND)
  RB(I)=NX(ND)
  *GET,QBR6(I),NODE,ND,RF,CHRG
*ENDDO
SET,6,1,,1
NSEL,S,LOC,Y,H-TOL,H+TOL
ND=0
*DO,I,1,NTOP
  ND=NDNEXT(ND)
  *GET,QTI6(I),NODE,ND,RF,CHRG
*ENDDO
NSEL,S,LOC,Y,-H-TOL,-H+TOL
ND=0
*DO,I,1,NTOP
  ND=NDNEXT(ND)
  *GET,QBI6(I),NODE,ND,RF,CHRG
*ENDDO
ALLSEL,ALL
*CFOPEN,ansys_p5mix_e31m_cc_c73_m320_ls6,txt
*VWRITE
('i  r_top  QtopRe  QtopIm  r_bot  QbotRe  QbotIm   [mm, mC]')
*VWRITE,IDX(1),RT(1),QTR6(1),QTI6(1),RB(1),QBR6(1),QBI6(1)
(F6.0,1X,E20.12,1X,E20.12,1X,E20.12,1X,E20.12,1X,E20.12,1X,E20.12)
*CFCLOS

*CFOPEN,ansys_p5mix_e31m_cc_c73_m320_freqs,txt
*VWRITE
('ls   freq_Hz')
*VWRITE,LSN(1),FRQ(1)
(F4.0,3X,E20.12)
*CFCLOS
FINISH
