! ansys_p5seg_e31m_c73_m160_2026-09-24.inp
! Paper 5 segmented-electrode sensing charge, harmonic FE (2026-09-24).
! Built by build_p5seg_decks_2026-09-24.py. Do not hand-edit; rebuild.
! Pre-registration: PAPER5_E15_SEGMENT_CHARGE_DERIVATION_2026-09-24.md.
! Question: does the inner-segment face charge follow Kirchhoff
! (e15*gamma_rz dropped, Paper 5 Eq. Ysense) or the consistent
! leading-order model with the e15 shear term (kappa = -0.0547 x Kirchhoff
! at C44E = 73 GPa)?
! Geometry/material/element: the Sec 18.201 Paper 5 F-F deck
! (ansys_p5_epsrel_ff_lanb_scboth_2026-09-19.inp), C44E parameterised.
! UNITS: mm-N-s-tonne, real volts. CHRG comes out in mC (1e-3 C).
! LS1: sign calibration. Top inner segment (r <= RSTAR) at 1 V, all
!      other face nodes 0 V, no force. Its CHRG sum must be > 0.
! LS2..LS6: all face nodes 0 V (both faces fully electroded, SC),
!      FY = 1 N total ring load at r = RLOAD (350 mm), spread over the through-
!      thickness node line (symmetric in z: flexure only).
! Output: one file per load step, raw per-node r and CHRG (Re, Im) on
! the top and bottom faces. The scorer does every sum and ratio.
! Do not put the MAPDL failure token in this file (queue grep false-fail).
! ============================================================
FINISH
/CLEAR,NOSTART
/TITLE, Paper 5 segmented-electrode harmonic charge, C44E=73 GPa, mesh 160x12 (2026-09-24)

RI     = 100.0
RO     = 600.0
H      = 10.0
RLOAD  = 350.0
RSTAR  = 300.0
TOL    = 1.0E-3
NDIV_R = 160
NDIV_Z = 12
FTOT   = 1.0

C11E = 1.320E5
C12E = 7.100E4
C13E = 7.300E4
C33E = 1.150E5
C44E = 7.3000E+04
C66E = (C11E-C12E)/2
E31  = -4.1E-3
E33  = 1.41E-2
E15  = 1.05E-2
EPS0   = 8.854E-12
X11ABS = 7.124E-9
X33ABS = 5.841E-9
X11    = X11ABS/EPS0
X33    = X33ABS/EPS0
RHO_PZT = 7.500E-9

/PREP7
ET,1,PLANE223
KEYOPT,1,1,1001
KEYOPT,1,3,1

TB,ANEL,1,1,,0
TBDATA,1,C11E,C13E,C12E,0,0,0
TBDATA,7,C33E,C13E,0,0,0
TBDATA,12,C11E,0,0,0
TBDATA,16,C44E,0,0
TBDATA,19,C66E,0
TBDATA,21,C44E
TB,PIEZ,1
TBDATA,1,0,E31,0,0,E33,0
TBDATA,7,0,E31,0,E15,0,0
TBDATA,13,0,0,E15,0,0,0
MP,PERX,1,X11
MP,PERY,1,X33
MP,PERZ,1,X11
MP,DENS,1,RHO_PZT

RECTNG,RI,RO,-H,H
ASEL,S,AREA,,1
AATT,1,,1
LSLA,S
LSEL,R,LOC,X,RI
LESIZE,ALL,,,NDIV_Z,,,,,1
LSLA,S
LSEL,R,LOC,X,RO
LESIZE,ALL,,,NDIV_Z,,,,,1
LSLA,S
LSEL,R,LOC,Y,-H
LESIZE,ALL,,,NDIV_R,,,,,1
LSLA,S
LSEL,R,LOC,Y,H
LESIZE,ALL,,,NDIV_R,,,,,1
ALLSEL,ALL
ASEL,S,AREA,,1
MSHAPE,0,2D
MSHKEY,1
AMESH,ALL
ALLSEL,ALL
! Mesh guards: RSTAR and RLOAD must be corner-node radii, and the element
! count must be NDIV_R*NDIV_Z. *MSG,FATAL stops the deck before any solve
! (same guard pattern as build_p4_3d_nge1_decks_2026-09-23.py).
*GET,NELEM,ELEM,0,COUNT
*IF,NELEM,NE,NDIV_R*NDIV_Z,THEN
  *MSG,FATAL
Mapped mesh element count does not equal NDIV_R*NDIV_Z.
*ENDIF
NSEL,S,LOC,Y,H-TOL,H+TOL
NSEL,R,LOC,X,RSTAR-TOL,RSTAR+TOL
*GET,NCHK1,NODE,0,COUNT
NSEL,S,LOC,X,RLOAD-TOL,RLOAD+TOL
*GET,NFN,NODE,0,COUNT
ALLSEL,ALL
*IF,NCHK1,NE,1,THEN
  *MSG,FATAL
No single top-face node at r = RSTAR.
*ENDIF
*IF,NFN,NE,2*NDIV_Z+1,THEN
  *MSG,FATAL
Force node line at r = RLOAD is not 2*NDIV_Z+1 nodes.
*ENDIF
FINISH

/SOLU
ANTYPE,HARMIC
HROPT,FULL
HROUT,OFF
OUTRES,NSOL,ALL
OUTRES,RSOL,ALL
KBC,1
EQSLV,SPARSE

! Both faces grounded everywhere.
NSEL,S,LOC,Y,H-TOL,H+TOL
NSEL,A,LOC,Y,-H-TOL,-H+TOL
D,ALL,VOLT,0
ALLSEL,ALL

! LS1 -- sign calibration: top inner segment at 1 V, no force.
NSEL,S,LOC,Y,H-TOL,H+TOL
NSEL,R,LOC,X,RI-TOL,RSTAR+TOL
D,ALL,VOLT,1.0
ALLSEL,ALL
HARFRQ,15.915494309,15.915494309
NSUBST,1
LSWRITE,1

! LS2..LS6 -- SC, ring load at RLOAD.
NSEL,S,LOC,Y,H-TOL,H+TOL
NSEL,R,LOC,X,RI-TOL,RSTAR+TOL
D,ALL,VOLT,0
NSEL,S,LOC,X,RLOAD-TOL,RLOAD+TOL
F,ALL,FY,FTOT/NFN
ALLSEL,ALL
HARFRQ,15.915494309,15.915494309
NSUBST,1
LSWRITE,2
HARFRQ,31.830988618,31.830988618
NSUBST,1
LSWRITE,3
HARFRQ,127.323954474,127.323954474
NSUBST,1
LSWRITE,4
HARFRQ,159.154943092,159.154943092
NSUBST,1
LSWRITE,5
HARFRQ,190.985931710,190.985931710
NSUBST,1
LSWRITE,6

LSSOLVE,1,6
FINISH

/POST1
! Human-readable label check (one PRRSOL, LS2 real part).
SET,2,1,,0
NSEL,S,LOC,Y,H-TOL,H+TOL
NSEL,R,LOC,X,RSTAR-TOL,RSTAR+TOL
PRRSOL,CHRG
ALLSEL,ALL

NSEL,S,LOC,Y,H-TOL,H+TOL
*GET,NTOP,NODE,0,COUNT
ALLSEL,ALL
*DIM,IDX,ARRAY,NTOP
*DIM,RT,ARRAY,NTOP
*DIM,RB,ARRAY,NTOP
*DIM,FRQ,ARRAY,6
*DIM,LSN,ARRAY,6
! ---- load step 1 ----
*DIM,QTR1,ARRAY,NTOP
*DIM,QTI1,ARRAY,NTOP
*DIM,QBR1,ARRAY,NTOP
*DIM,QBI1,ARRAY,NTOP
SET,1,1,,0
*GET,FRQ(1),ACTIVE,0,SET,FREQ
LSN(1)=1
NSEL,S,LOC,Y,H-TOL,H+TOL
ND=0
*DO,I,1,NTOP
  ND=NDNEXT(ND)
  IDX(I)=I
  RT(I)=NX(ND)
  *GET,QTR1(I),NODE,ND,RF,CHRG
*ENDDO
NSEL,S,LOC,Y,-H-TOL,-H+TOL
ND=0
*DO,I,1,NTOP
  ND=NDNEXT(ND)
  RB(I)=NX(ND)
  *GET,QBR1(I),NODE,ND,RF,CHRG
*ENDDO
SET,1,1,,1
NSEL,S,LOC,Y,H-TOL,H+TOL
ND=0
*DO,I,1,NTOP
  ND=NDNEXT(ND)
  *GET,QTI1(I),NODE,ND,RF,CHRG
*ENDDO
NSEL,S,LOC,Y,-H-TOL,-H+TOL
ND=0
*DO,I,1,NTOP
  ND=NDNEXT(ND)
  *GET,QBI1(I),NODE,ND,RF,CHRG
*ENDDO
ALLSEL,ALL
*CFOPEN,ansys_p5seg_e31m_c73_m160_ls1,txt
*VWRITE
('i  r_top  QtopRe  QtopIm  r_bot  QbotRe  QbotIm   [mm, mC]')
*VWRITE,IDX(1),RT(1),QTR1(1),QTI1(1),RB(1),QBR1(1),QBI1(1)
(F6.0,1X,E20.12,1X,E20.12,1X,E20.12,1X,E20.12,1X,E20.12,1X,E20.12)
*CFCLOS
! ---- load step 2 ----
*DIM,QTR2,ARRAY,NTOP
*DIM,QTI2,ARRAY,NTOP
*DIM,QBR2,ARRAY,NTOP
*DIM,QBI2,ARRAY,NTOP
SET,2,1,,0
*GET,FRQ(2),ACTIVE,0,SET,FREQ
LSN(2)=2
NSEL,S,LOC,Y,H-TOL,H+TOL
ND=0
*DO,I,1,NTOP
  ND=NDNEXT(ND)
  IDX(I)=I
  RT(I)=NX(ND)
  *GET,QTR2(I),NODE,ND,RF,CHRG
*ENDDO
NSEL,S,LOC,Y,-H-TOL,-H+TOL
ND=0
*DO,I,1,NTOP
  ND=NDNEXT(ND)
  RB(I)=NX(ND)
  *GET,QBR2(I),NODE,ND,RF,CHRG
*ENDDO
SET,2,1,,1
NSEL,S,LOC,Y,H-TOL,H+TOL
ND=0
*DO,I,1,NTOP
  ND=NDNEXT(ND)
  *GET,QTI2(I),NODE,ND,RF,CHRG
*ENDDO
NSEL,S,LOC,Y,-H-TOL,-H+TOL
ND=0
*DO,I,1,NTOP
  ND=NDNEXT(ND)
  *GET,QBI2(I),NODE,ND,RF,CHRG
*ENDDO
ALLSEL,ALL
*CFOPEN,ansys_p5seg_e31m_c73_m160_ls2,txt
*VWRITE
('i  r_top  QtopRe  QtopIm  r_bot  QbotRe  QbotIm   [mm, mC]')
*VWRITE,IDX(1),RT(1),QTR2(1),QTI2(1),RB(1),QBR2(1),QBI2(1)
(F6.0,1X,E20.12,1X,E20.12,1X,E20.12,1X,E20.12,1X,E20.12,1X,E20.12)
*CFCLOS
! ---- load step 3 ----
*DIM,QTR3,ARRAY,NTOP
*DIM,QTI3,ARRAY,NTOP
*DIM,QBR3,ARRAY,NTOP
*DIM,QBI3,ARRAY,NTOP
SET,3,1,,0
*GET,FRQ(3),ACTIVE,0,SET,FREQ
LSN(3)=3
NSEL,S,LOC,Y,H-TOL,H+TOL
ND=0
*DO,I,1,NTOP
  ND=NDNEXT(ND)
  IDX(I)=I
  RT(I)=NX(ND)
  *GET,QTR3(I),NODE,ND,RF,CHRG
*ENDDO
NSEL,S,LOC,Y,-H-TOL,-H+TOL
ND=0
*DO,I,1,NTOP
  ND=NDNEXT(ND)
  RB(I)=NX(ND)
  *GET,QBR3(I),NODE,ND,RF,CHRG
*ENDDO
SET,3,1,,1
NSEL,S,LOC,Y,H-TOL,H+TOL
ND=0
*DO,I,1,NTOP
  ND=NDNEXT(ND)
  *GET,QTI3(I),NODE,ND,RF,CHRG
*ENDDO
NSEL,S,LOC,Y,-H-TOL,-H+TOL
ND=0
*DO,I,1,NTOP
  ND=NDNEXT(ND)
  *GET,QBI3(I),NODE,ND,RF,CHRG
*ENDDO
ALLSEL,ALL
*CFOPEN,ansys_p5seg_e31m_c73_m160_ls3,txt
*VWRITE
('i  r_top  QtopRe  QtopIm  r_bot  QbotRe  QbotIm   [mm, mC]')
*VWRITE,IDX(1),RT(1),QTR3(1),QTI3(1),RB(1),QBR3(1),QBI3(1)
(F6.0,1X,E20.12,1X,E20.12,1X,E20.12,1X,E20.12,1X,E20.12,1X,E20.12)
*CFCLOS
! ---- load step 4 ----
*DIM,QTR4,ARRAY,NTOP
*DIM,QTI4,ARRAY,NTOP
*DIM,QBR4,ARRAY,NTOP
*DIM,QBI4,ARRAY,NTOP
SET,4,1,,0
*GET,FRQ(4),ACTIVE,0,SET,FREQ
LSN(4)=4
NSEL,S,LOC,Y,H-TOL,H+TOL
ND=0
*DO,I,1,NTOP
  ND=NDNEXT(ND)
  IDX(I)=I
  RT(I)=NX(ND)
  *GET,QTR4(I),NODE,ND,RF,CHRG
*ENDDO
NSEL,S,LOC,Y,-H-TOL,-H+TOL
ND=0
*DO,I,1,NTOP
  ND=NDNEXT(ND)
  RB(I)=NX(ND)
  *GET,QBR4(I),NODE,ND,RF,CHRG
*ENDDO
SET,4,1,,1
NSEL,S,LOC,Y,H-TOL,H+TOL
ND=0
*DO,I,1,NTOP
  ND=NDNEXT(ND)
  *GET,QTI4(I),NODE,ND,RF,CHRG
*ENDDO
NSEL,S,LOC,Y,-H-TOL,-H+TOL
ND=0
*DO,I,1,NTOP
  ND=NDNEXT(ND)
  *GET,QBI4(I),NODE,ND,RF,CHRG
*ENDDO
ALLSEL,ALL
*CFOPEN,ansys_p5seg_e31m_c73_m160_ls4,txt
*VWRITE
('i  r_top  QtopRe  QtopIm  r_bot  QbotRe  QbotIm   [mm, mC]')
*VWRITE,IDX(1),RT(1),QTR4(1),QTI4(1),RB(1),QBR4(1),QBI4(1)
(F6.0,1X,E20.12,1X,E20.12,1X,E20.12,1X,E20.12,1X,E20.12,1X,E20.12)
*CFCLOS
! ---- load step 5 ----
*DIM,QTR5,ARRAY,NTOP
*DIM,QTI5,ARRAY,NTOP
*DIM,QBR5,ARRAY,NTOP
*DIM,QBI5,ARRAY,NTOP
SET,5,1,,0
*GET,FRQ(5),ACTIVE,0,SET,FREQ
LSN(5)=5
NSEL,S,LOC,Y,H-TOL,H+TOL
ND=0
*DO,I,1,NTOP
  ND=NDNEXT(ND)
  IDX(I)=I
  RT(I)=NX(ND)
  *GET,QTR5(I),NODE,ND,RF,CHRG
*ENDDO
NSEL,S,LOC,Y,-H-TOL,-H+TOL
ND=0
*DO,I,1,NTOP
  ND=NDNEXT(ND)
  RB(I)=NX(ND)
  *GET,QBR5(I),NODE,ND,RF,CHRG
*ENDDO
SET,5,1,,1
NSEL,S,LOC,Y,H-TOL,H+TOL
ND=0
*DO,I,1,NTOP
  ND=NDNEXT(ND)
  *GET,QTI5(I),NODE,ND,RF,CHRG
*ENDDO
NSEL,S,LOC,Y,-H-TOL,-H+TOL
ND=0
*DO,I,1,NTOP
  ND=NDNEXT(ND)
  *GET,QBI5(I),NODE,ND,RF,CHRG
*ENDDO
ALLSEL,ALL
*CFOPEN,ansys_p5seg_e31m_c73_m160_ls5,txt
*VWRITE
('i  r_top  QtopRe  QtopIm  r_bot  QbotRe  QbotIm   [mm, mC]')
*VWRITE,IDX(1),RT(1),QTR5(1),QTI5(1),RB(1),QBR5(1),QBI5(1)
(F6.0,1X,E20.12,1X,E20.12,1X,E20.12,1X,E20.12,1X,E20.12,1X,E20.12)
*CFCLOS
! ---- load step 6 ----
*DIM,QTR6,ARRAY,NTOP
*DIM,QTI6,ARRAY,NTOP
*DIM,QBR6,ARRAY,NTOP
*DIM,QBI6,ARRAY,NTOP
SET,6,1,,0
*GET,FRQ(6),ACTIVE,0,SET,FREQ
LSN(6)=6
NSEL,S,LOC,Y,H-TOL,H+TOL
ND=0
*DO,I,1,NTOP
  ND=NDNEXT(ND)
  IDX(I)=I
  RT(I)=NX(ND)
  *GET,QTR6(I),NODE,ND,RF,CHRG
*ENDDO
NSEL,S,LOC,Y,-H-TOL,-H+TOL
ND=0
*DO,I,1,NTOP
  ND=NDNEXT(ND)
  RB(I)=NX(ND)
  *GET,QBR6(I),NODE,ND,RF,CHRG
*ENDDO
SET,6,1,,1
NSEL,S,LOC,Y,H-TOL,H+TOL
ND=0
*DO,I,1,NTOP
  ND=NDNEXT(ND)
  *GET,QTI6(I),NODE,ND,RF,CHRG
*ENDDO
NSEL,S,LOC,Y,-H-TOL,-H+TOL
ND=0
*DO,I,1,NTOP
  ND=NDNEXT(ND)
  *GET,QBI6(I),NODE,ND,RF,CHRG
*ENDDO
ALLSEL,ALL
*CFOPEN,ansys_p5seg_e31m_c73_m160_ls6,txt
*VWRITE
('i  r_top  QtopRe  QtopIm  r_bot  QbotRe  QbotIm   [mm, mC]')
*VWRITE,IDX(1),RT(1),QTR6(1),QTI6(1),RB(1),QBR6(1),QBI6(1)
(F6.0,1X,E20.12,1X,E20.12,1X,E20.12,1X,E20.12,1X,E20.12,1X,E20.12)
*CFCLOS

*CFOPEN,ansys_p5seg_e31m_c73_m160_freqs,txt
*VWRITE
('ls   freq_Hz')
*VWRITE,LSN(1),FRQ(1)
(F4.0,3X,E20.12)
*CFCLOS
FINISH
